// COMSOL Multiphysics 6.4.0.293 model "EggModel.mph"
// Outline of the model tree

Variables
  var1 "Variables 1"
  var2 "Variables 2"

Geometry
  geom1 "Geometry 1" (3D, length unit m)
    wp1: WorkPlane | unite = on
      pol1: Polygon | source = file; filename = C:\Users\kroko\Downloads\Telegram Desktop\cavity.txt
      pol2: Polygon | source = file; filename = C:\Users\kroko\Downloads\Telegram Desktop\white.txt
      pol3: Polygon | source = file; filename = C:\Users\kroko\Downloads\Telegram Desktop\yolk.txt
    rev1: Revolve
      revolvefrom = faces
      workplane = wp1
      input = wp1
      inputface = wp1.uni boundaries 1-3
      angtype = full
      revaxis = {{0, 1}, {-10, 0}}
      pos = {0, -10}
      axis = {1, 0}
    fin: Finalize "Form Union"

Materials
  alb: Common "Albumen" on domains 1
  yolk: Common on domains 2
  air: Common on domains 3

Physics
  c: CoefficientFormPDE on all domains
    dependent variable u
    EquationForm.form = Automatic
    cfeq1: CoefficientFormPDE (default) | c = 1; f = 1; da = 1
    zflx1: ZeroFluxBoundary "Zero Flux 1" (default)
    init1: init "Initial Values 1" (default)

Mesh
  mesh1 "Mesh 1" (physics-controlled)

Studies
  std1 "Study 1"
    time: Transient "Time Dependent" | tlist = range(0,0.1,1)